# OpenSim document version 10905
Model DLR kinematic hand model (subject 1, version 2.1):
  length_units: meters
  force_units: N
  gravity: 0 -9.80665 0
  credits:
    Georg Stillfried, Karolina Stonawska, Ulrich Hillenbrand, Marcus Settles, Patrick van der Smagt
  publications:
    Movement model of a human hand based on magnetic resonance imaging (MRI), International Conference on Applied Bionics and Biomechanics (ICABB) 2010, Venice.
  BodySet:
    Body ground: mass=0 mass_center=(0 0 0) inertia_xx=0 inertia_yy=0 inertia_zz=0 meshes=bone2_1.vtp
    Body MCP2a: mass=0 mass_center=(0 0 0) inertia_xx=0 inertia_yy=0 inertia_zz=0
      CustomJoint MCP2a: parent_body=ground location_in_parent=(0.00112756 -0.02894003 -0.00258697)
          orientation_in_parent=(-2.971532 0.1737332 1.592265) location=(0 0 0)
        Coordinate MCP2a: motion_type=rotational default_value=0.8552113 initial_value=0 range=(-0.55 1.373)
            clamped=false
        SpatialTransform: axes_held_at_zero=(rotation2 rotation3 translation1 translation2 translation3)
          TransformAxis rotation1: coordinates=MCP2a axis=(0 0 1) LinearFunction(coefficients=1 0)
    Body MCP2b: mass=0 mass_center=(0 0 0) inertia_xx=0 inertia_yy=0 inertia_zz=0
      CustomJoint MCP2b: parent_body=MCP2a location_in_parent=(0 0 0)
          orientation_in_parent=(-1.570796 -0.03952681 1.84402) location=(0 0 0)
        Coordinate MCP2b: motion_type=rotational default_value=0.3141593 initial_value=0 range=(-0.323 0.871)
            clamped=false
        SpatialTransform: axes_held_at_zero=(rotation2 rotation3 translation1 translation2 translation3)
          TransformAxis rotation1: coordinates=MCP2b axis=(0 0 1) LinearFunction(coefficients=1 0)
    Body PP2: mass=0 mass_center=(0 0 0) inertia_xx=0 inertia_yy=0 inertia_zz=0 meshes=bone2_2.vtp
      WeldJoint PP2: parent_body=MCP2b location_in_parent=(-0.01266949 -0.01784861 -0.02001128)
          orientation_in_parent=(2.389422 1.094764 -1.497329) location=(0 0 0)
    Body PIP2: mass=0 mass_center=(0 0 0) inertia_xx=0 inertia_yy=0 inertia_zz=0
      CustomJoint PIP2: parent_body=PP2 location_in_parent=(0.00266634 -0.01770148 0.00149144)
          orientation_in_parent=(3.024079 0.3260353 -2.454652) location=(0 0 0)
        Coordinate PIP2: motion_type=rotational default_value=0.4014257 initial_value=0 range=(-1.638 0.541)
            clamped=false
        SpatialTransform: axes_held_at_zero=(rotation2 rotation3 translation1 translation2 translation3)
          TransformAxis rotation1: coordinates=PIP2 axis=(0 0 1) LinearFunction(coefficients=1 0)
    Body PM2: mass=0 mass_center=(0 0 0) inertia_xx=0 inertia_yy=0 inertia_zz=0 meshes=bone2_3.vtp
      WeldJoint PM2: parent_body=PIP2 location_in_parent=(-0.01430452 -0.00863928 0.00285207)
          orientation_in_parent=(2.84757 0.01994079 -2.104444) location=(0 0 0)
    Body DIP2: mass=0 mass_center=(0 0 0) inertia_xx=0 inertia_yy=0 inertia_zz=0
      CustomJoint DIP2: parent_body=PM2 location_in_parent=(0.00114957 -0.01167801 0.00171634)
          orientation_in_parent=(3.109193 0.05910672 -2.138923) location=(0 0 0)
        Coordinate DIP2: motion_type=rotational default_value=0.3141593 initial_value=0 range=(-1.066 1.129)
            clamped=false
        SpatialTransform: axes_held_at_zero=(rotation2 rotation3 translation1 translation2 translation3)
          TransformAxis rotation1: coordinates=DIP2 axis=(0 0 1) LinearFunction(coefficients=1 0)
    Body PD2: mass=0 mass_center=(0 0 0) inertia_xx=0 inertia_yy=0 inertia_zz=0 meshes=bone2_4.vtp
      WeldJoint PD2: parent_body=DIP2 location_in_parent=(-0.01085286 -0.00165782 0.00180878)
          orientation_in_parent=(-3.128729 -0.05112821 -1.842262) location=(0 0 0)
    Body CMC1a: mass=0 mass_center=(0 0 0) inertia_xx=0 inertia_yy=0 inertia_zz=0
      CustomJoint CMC1a: parent_body=ground location_in_parent=(0.01950111 0.02695073 0.00443441)
          orientation_in_parent=(2.48728 -0.1475471 0.4288854) location=(0 0 0)
        Coordinate CMC1a: motion_type=rotational default_value=0.03490659 initial_value=0 range=(-0.929 0.27)
            clamped=false
        SpatialTransform: axes_held_at_zero=(rotation2 rotation3 translation1 translation2 translation3)
          TransformAxis rotation1: coordinates=CMC1a axis=(0 0 1) LinearFunction(coefficients=1 0)
    Body CMC1b: mass=0 mass_center=(0 0 0) inertia_xx=0 inertia_yy=0 inertia_zz=0
      CustomJoint CMC1b: parent_body=CMC1a location_in_parent=(-0.01737179 -0.00971473 0.00000009)
          orientation_in_parent=(-1.385156 -0.5025576 0.6569192) location=(0 0 0)
        Coordinate CMC1b: motion_type=rotational default_value=0.1859884 initial_value=0 range=(-0.675 0.186)
            clamped=false
        SpatialTransform: axes_held_at_zero=(rotation2 rotation3 translation1 translation2 translation3)
          TransformAxis rotation1: coordinates=CMC1b axis=(0 0 1) LinearFunction(coefficients=1 0)
    Body MC1: mass=0 mass_center=(0 0 0) inertia_xx=0 inertia_yy=0 inertia_zz=0 meshes=bone1_1.vtp
      WeldJoint MC1: parent_body=CMC1b location_in_parent=(0.03354848 -0.01248297 0.01216455)
          orientation_in_parent=(-2.862246 0.8516535 1.946582) location=(0 0 0)
    Body MCP1a: mass=0 mass_center=(0 0 0) inertia_xx=0 inertia_yy=0 inertia_zz=0
      CustomJoint MCP1a: parent_body=MC1 location_in_parent=(0.00137157 -0.01779916 -0.00084812)
          orientation_in_parent=(3.053903 -0.00793818 0.1804457) location=(0 0 0)
        Coordinate MCP1a: motion_type=rotational default_value=0.6457718 initial_value=0 range=(-0.361 1.254)
            clamped=false
        SpatialTransform: axes_held_at_zero=(rotation2 rotation3 translation1 translation2 translation3)
          TransformAxis rotation1: coordinates=MCP1a axis=(0 0 1) LinearFunction(coefficients=1 0)
    Body MCP1b: mass=0 mass_center=(0 0 0) inertia_xx=0 inertia_yy=0 inertia_zz=0
      CustomJoint MCP1b: parent_body=MCP1a location_in_parent=(0 0 0)
          orientation_in_parent=(1.570748 -1.500237 -1.407019) location=(0 0 0)
        Coordinate MCP1b: motion_type=rotational default_value=0.1047198 initial_value=0 range=(-0.392 0.799)
            clamped=false
        SpatialTransform: axes_held_at_zero=(rotation2 rotation3 translation1 translation2 translation3)
          TransformAxis rotation1: coordinates=MCP1b axis=(0 0 1) LinearFunction(coefficients=1 0)
    Body PP1: mass=0 mass_center=(0 0 0) inertia_xx=0 inertia_yy=0 inertia_zz=0 meshes=bone1_2.vtp
      WeldJoint PP1: parent_body=MCP1b location_in_parent=(-0.00881935 -0.01471952 -0.01733277)
          orientation_in_parent=(1.575822 1.033414 -0.709049) location=(0 0 0)
    Body IP1: mass=0 mass_center=(0 0 0) inertia_xx=0 inertia_yy=0 inertia_zz=0
      CustomJoint IP1: parent_body=PP1 location_in_parent=(0.00191091 -0.0136391 0.00135957)
          orientation_in_parent=(3.121223 -0.2734143 2.993783) location=(0 0 0)
        Coordinate IP1: motion_type=rotational default_value=0.5759587 initial_value=0 range=(-0.79 1.003)
            clamped=false
        SpatialTransform: axes_held_at_zero=(rotation2 rotation3 translation1 translation2 translation3)
          TransformAxis rotation1: coordinates=IP1 axis=(0 0 1) LinearFunction(coefficients=1 0)
    Body PD1: mass=0 mass_center=(0 0 0) inertia_xx=0 inertia_yy=0 inertia_zz=0 meshes=bone1_3.vtp
      WeldJoint PD1: parent_body=IP1 location_in_parent=(-0.0076659 -0.01410628 0.00128191)
          orientation_in_parent=(-3.095463 -0.1463735 -2.760677) location=(0 0 0)
    Body IMC3: mass=0 mass_center=(0 0 0) inertia_xx=0 inertia_yy=0 inertia_zz=0
      CustomJoint IMC3: parent_body=ground location_in_parent=(0.000273 0.01967667 -0.00381503)
          orientation_in_parent=(1.771154 -0.08468856 0.1035853) location=(0 0 0)
        Coordinate IMC3: motion_type=rotational default_value=-0.06981317 initial_value=0 range=(-0.076 0.27)
            clamped=false
        SpatialTransform: axes_held_at_zero=(rotation2 rotation3 translation1 translation2 translation3)
          TransformAxis rotation1: coordinates=IMC3 axis=(0 0 1) LinearFunction(coefficients=1 0)
    Body MC3: mass=0 mass_center=(0 0 0) inertia_xx=0 inertia_yy=0 inertia_zz=0 meshes=bone3_1.vtp
      WeldJoint MC3: parent_body=IMC3 location_in_parent=(-0.00495342 -0.00967755 0.01997446)
          orientation_in_parent=(-1.556629 0.07360124 0.02460249) location=(0 0 0)
    Body MCP3a: mass=0 mass_center=(0 0 0) inertia_xx=0 inertia_yy=0 inertia_zz=0
      CustomJoint MCP3a: parent_body=MC3 location_in_parent=(0.00248792 -0.02788517 0.00056535)
          orientation_in_parent=(-3.064816 0.1811914 2.341618) location=(0 0 0)
        Coordinate MCP3a: motion_type=rotational default_value=0.7330383 initial_value=0 range=(-0.691 1.365)
            clamped=false
        SpatialTransform: axes_held_at_zero=(rotation2 rotation3 translation1 translation2 translation3)
          TransformAxis rotation1: coordinates=MCP3a axis=(0 0 1) LinearFunction(coefficients=1 0)
    Body MCP3b: mass=0 mass_center=(0 0 0) inertia_xx=0 inertia_yy=0 inertia_zz=0
      CustomJoint MCP3b: parent_body=MCP3a location_in_parent=(0 0 0)
          orientation_in_parent=(-1.570796 0.7374068 1.702781) location=(0 0 0)
        Coordinate MCP3b: motion_type=rotational default_value=0.2617994 initial_value=0 range=(-0.361 0.379)
            clamped=false
        SpatialTransform: axes_held_at_zero=(rotation2 rotation3 translation1 translation2 translation3)
          TransformAxis rotation1: coordinates=MCP3b axis=(0 0 1) LinearFunction(coefficients=1 0)
    Body PP3: mass=0 mass_center=(0 0 0) inertia_xx=0 inertia_yy=0 inertia_zz=0 meshes=bone3_2.vtp
      WeldJoint PP3: parent_body=MCP3b location_in_parent=(-0.00585579 -0.02263291 -0.02216632)
          orientation_in_parent=(2.830248 1.387225 -2.015679) location=(0 0 0)
    Body PIP3: mass=0 mass_center=(0 0 0) inertia_xx=0 inertia_yy=0 inertia_zz=0
      CustomJoint PIP3: parent_body=PP3 location_in_parent=(0.00297529 -0.01983706 0.00041341)
          orientation_in_parent=(-3.101282 0.0516092 1.81548) location=(0 0 0)
        Coordinate PIP3: motion_type=rotational default_value=0.5759587 initial_value=0 range=(-1.419 0.803)
            clamped=false
        SpatialTransform: axes_held_at_zero=(rotation2 rotation3 translation1 translation2 translation3)
          TransformAxis rotation1: coordinates=PIP3 axis=(0 0 1) LinearFunction(coefficients=1 0)
    Body PM3: mass=0 mass_center=(0 0 0) inertia_xx=0 inertia_yy=0 inertia_zz=0 meshes=bone3_3.vtp
      WeldJoint PM3: parent_body=PIP3 location_in_parent=(0.0128016 -0.0146496 0.00044222)
          orientation_in_parent=(-3.107045 -0.03576496 2.414162) location=(0 0 0)
    Body DIP3: mass=0 mass_center=(0 0 0) inertia_xx=0 inertia_yy=0 inertia_zz=0
      CustomJoint DIP3: parent_body=PM3 location_in_parent=(0.00011917 -0.01368763 -0.00012773)
          orientation_in_parent=(-3.062948 0.295096 2.624053) location=(0 0 0)
        Coordinate DIP3: motion_type=rotational default_value=0.3316126 initial_value=0 range=(-1.206 0.698)
            clamped=false
        SpatialTransform: axes_held_at_zero=(rotation2 rotation3 translation1 translation2 translation3)
          TransformAxis rotation1: coordinates=DIP3 axis=(0 0 1) LinearFunction(coefficients=1 0)
    Body PD3: mass=0 mass_center=(0 0 0) inertia_xx=0 inertia_yy=0 inertia_zz=0 meshes=bone3_4.vtp
      WeldJoint PD3: parent_body=DIP3 location_in_parent=(0.00232482 -0.01259866 0.00071799)
          orientation_in_parent=(3.053946 -0.2722267 2.953875) location=(0 0 0)
    Body IMC4: mass=0 mass_center=(0 0 0) inertia_xx=0 inertia_yy=0 inertia_zz=0
      CustomJoint IMC4: parent_body=MC3 location_in_parent=(0.00060402 0.02840978 -0.0080106)
          orientation_in_parent=(1.274087 -0.1927963 0.1428613) location=(0 0 0)
        Coordinate IMC4: motion_type=rotational default_value=-0.06981317 initial_value=0 range=(-0.085 0.276)
            clamped=false
        SpatialTransform: axes_held_at_zero=(rotation2 rotation3 translation1 translation2 translation3)
          TransformAxis rotation1: coordinates=IMC4 axis=(0 0 1) LinearFunction(coefficients=1 0)
    Body MC4: mass=0 mass_center=(0 0 0) inertia_xx=0 inertia_yy=0 inertia_zz=0 meshes=bone4_1.vtp
      WeldJoint MC4: parent_body=IMC4 location_in_parent=(0.0030355 -0.0128709 0.02243187)
          orientation_in_parent=(-1.146072 0.08117748 0.2379886) location=(0 0 0)
    Body MCP4a: mass=0 mass_center=(0 0 0) inertia_xx=0 inertia_yy=0 inertia_zz=0
      CustomJoint MCP4a: parent_body=MC4 location_in_parent=(0.00073153 -0.02481215 -0.00146137)
          orientation_in_parent=(-3.029986 0.0063905 0.114275) location=(0 0 0)
        Coordinate MCP4a: motion_type=rotational default_value=0.418879 initial_value=0 range=(-1.052 1.18)
            clamped=false
        SpatialTransform: axes_held_at_zero=(rotation2 rotation3 translation1 translation2 translation3)
          TransformAxis rotation1: coordinates=MCP4a axis=(0 0 1) LinearFunction(coefficients=1 0)
    Body MCP4b: mass=0 mass_center=(0 0 0) inertia_xx=0 inertia_yy=0 inertia_zz=0
      CustomJoint MCP4b: parent_body=MCP4a location_in_parent=(0 0 0)
          orientation_in_parent=(1.570798 -1.098042 -0.8895845) location=(0 0 0)
        Coordinate MCP4b: motion_type=rotational default_value=0.1047198 initial_value=0 range=(-0.478 0.299)
            clamped=false
        SpatialTransform: axes_held_at_zero=(rotation2 rotation3 translation1 translation2 translation3)
          TransformAxis rotation1: coordinates=MCP4b axis=(0 0 1) LinearFunction(coefficients=1 0)
    Body PP4: mass=0 mass_center=(0 0 0) inertia_xx=0 inertia_yy=0 inertia_zz=0 meshes=bone4_2.vtp
      WeldJoint PP4: parent_body=MCP4b location_in_parent=(-0.00768566 -0.01508707 -0.02405368)
          orientation_in_parent=(1.469508 1.047006 -0.5220563) location=(0 0 0)
    Body PIP4: mass=0 mass_center=(0 0 0) inertia_xx=0 inertia_yy=0 inertia_zz=0
      CustomJoint PIP4: parent_body=PP4 location_in_parent=(0.00013924 -0.01885876 -0.00029457)
          orientation_in_parent=(3.14059 0.01510742 -3.009102) location=(0 0 0)
        Coordinate PIP4: motion_type=rotational default_value=0.6283185 initial_value=0 range=(-1.379 0.902)
            clamped=false
        SpatialTransform: axes_held_at_zero=(rotation2 rotation3 translation1 translation2 translation3)
          TransformAxis rotation1: coordinates=PIP4 axis=(0 0 1) LinearFunction(coefficients=1 0)
    Body PM4: mass=0 mass_center=(0 0 0) inertia_xx=0 inertia_yy=0 inertia_zz=0 meshes=bone4_3.vtp
      WeldJoint PM4: parent_body=PIP4 location_in_parent=(-0.0119595 -0.01470671 -0.00124534)
          orientation_in_parent=(-3.065999 0.08018364 -2.414797) location=(0 0 0)
    Body DIP4: mass=0 mass_center=(0 0 0) inertia_xx=0 inertia_yy=0 inertia_zz=0
      CustomJoint DIP4: parent_body=PM4 location_in_parent=(0.00020388 -0.01304283 0.00054321)
          orientation_in_parent=(-3.138019 -0.03828433 -2.955449) location=(0 0 0)
        Coordinate DIP4: motion_type=rotational default_value=0.5759587 initial_value=0 range=(-0.965 0.987)
            clamped=false
        SpatialTransform: axes_held_at_zero=(rotation2 rotation3 translation1 translation2 translation3)
          TransformAxis rotation1: coordinates=DIP4 axis=(0 0 1) LinearFunction(coefficients=1 0)
    Body PD4: mass=0 mass_center=(0 0 0) inertia_xx=0 inertia_yy=0 inertia_zz=0 meshes=bone4_4.vtp
      WeldJoint PD4: parent_body=DIP4 location_in_parent=(-0.00880145 -0.00893865 -0.00069371)
          orientation_in_parent=(-3.094156 0.05304218 -2.432828) location=(0 0 0)
    Body IMC5: mass=0 mass_center=(0 0 0) inertia_xx=0 inertia_yy=0 inertia_zz=0
      CustomJoint IMC5: parent_body=MC4 location_in_parent=(0.00133314 0.02238944 -0.00555069)
          orientation_in_parent=(1.421552 -0.03266849 0.02812425) location=(0 0 0)
        Coordinate IMC5: motion_type=rotational default_value=-0.2617994 initial_value=0 range=(-0.265 0.135)
            clamped=false
        SpatialTransform: axes_held_at_zero=(rotation2 rotation3 translation1 translation2 translation3)
          TransformAxis rotation1: coordinates=IMC5 axis=(0 0 1) LinearFunction(coefficients=1 0)
    Body MC5: mass=0 mass_center=(0 0 0) inertia_xx=0 inertia_yy=0 inertia_zz=0 meshes=bone5_1.vtp
      WeldJoint MC5: parent_body=IMC5 location_in_parent=(0.00258619 -0.0143344 0.01765157)
          orientation_in_parent=(-1.285253 0.01422445 0.05413693) location=(0 0 0)
    Body MCP5a: mass=0 mass_center=(0 0 0) inertia_xx=0 inertia_yy=0 inertia_zz=0
      CustomJoint MCP5a: parent_body=MC5 location_in_parent=(0.00175437 -0.02346684 0.00120119)
          orientation_in_parent=(-1.592998 -1.083539 -1.10326) location=(0 0 0)
        Coordinate MCP5a: motion_type=rotational default_value=0.1047198 initial_value=0 range=(-0.65 0.305)
            clamped=false
        SpatialTransform: axes_held_at_zero=(rotation2 rotation3 translation1 translation2 translation3)
          TransformAxis rotation1: coordinates=MCP5a axis=(0 0 1) LinearFunction(coefficients=1 0)
    Body MCP5b: mass=0 mass_center=(0 0 0) inertia_xx=0 inertia_yy=0 inertia_zz=0
      CustomJoint MCP5b: parent_body=MCP5a location_in_parent=(0 0 0)
          orientation_in_parent=(-1.570793 -1.179602 1.842347) location=(0 0 0)
        Coordinate MCP5b: motion_type=rotational default_value=0.296706 initial_value=0 range=(-1.472 1.213)
            clamped=false
        SpatialTransform: axes_held_at_zero=(rotation2 rotation3 translation1 translation2 translation3)
          TransformAxis rotation1: coordinates=MCP5b axis=(0 0 1) LinearFunction(coefficients=1 0)
    Body PP5: mass=0 mass_center=(0 0 0) inertia_xx=0 inertia_yy=0 inertia_zz=0 meshes=bone5_2.vtp
      WeldJoint PP5: parent_body=MCP5b location_in_parent=(0.01915435 0.01451382 -0.00058784)
          orientation_in_parent=(3.066033 -0.02226447 0.9878506) location=(0 0 0)
    Body PIP5: mass=0 mass_center=(0 0 0) inertia_xx=0 inertia_yy=0 inertia_zz=0
      CustomJoint PIP5: parent_body=PP5 location_in_parent=(0.00101144 -0.01550217 -0.00049949)
          orientation_in_parent=(-3.090765 0.2212795 2.691717) location=(0 0 0)
        Coordinate PIP5: motion_type=rotational default_value=0 initial_value=0 range=(-1.846 0.253) clamped=false
        SpatialTransform: axes_held_at_zero=(rotation2 rotation3 translation1 translation2 translation3)
          TransformAxis rotation1: coordinates=PIP5 axis=(0 0 1) LinearFunction(coefficients=1 0)
    Body PM5: mass=0 mass_center=(0 0 0) inertia_xx=0 inertia_yy=0 inertia_zz=0 meshes=bone5_3.vtp
      WeldJoint PM5: parent_body=PIP5 location_in_parent=(0.00633628 -0.01348262 -0.00081588)
          orientation_in_parent=(-3.087561 -0.02893475 2.675235) location=(0 0 0)
    Body DIP5: mass=0 mass_center=(0 0 0) inertia_xx=0 inertia_yy=0 inertia_zz=0
      CustomJoint DIP5: parent_body=PM5 location_in_parent=(0.0001806 -0.01005921 -0.00268002)
          orientation_in_parent=(3.118112 -0.07074845 2.500916) location=(0 0 0)
        Coordinate DIP5: motion_type=rotational default_value=0.08726646 initial_value=0 range=(-1.439 0.369)
            clamped=false
        SpatialTransform: axes_held_at_zero=(rotation2 rotation3 translation1 translation2 translation3)
          TransformAxis rotation1: coordinates=DIP5 axis=(0 0 1) LinearFunction(coefficients=1 0)
    Body PD5: mass=0 mass_center=(0 0 0) inertia_xx=0 inertia_yy=0 inertia_zz=0 meshes=bone5_4.vtp
      WeldJoint PD5: parent_body=DIP5 location_in_parent=(0.00488881 -0.01017181 -0.00487303)
          orientation_in_parent=(-2.937112 0.01507082 2.627335) location=(0 0 0)
