# OpenSim document version 40000
Model DLRkinematichandmodel(subject1,version2.1):
  gravity: 0 -9.80665 0
  length_units: meters
  force_units: N
  credits:
    Georg Stillfried, Karolina Stonawska, Ulrich Hillenbrand, Marcus Settles, Patrick van der Smagt
  publications:
    Movement model of a human hand based on magnetic resonance imaging (MRI), International Conference on Applied Bionics and Biomechanics (ICABB) 2010, Venice.
  Ground: meshes=bone2_1.vtp
  BodySet:
    Body MCP2a: mass=0 [kg] mass_center=(0 0 0) inertia=(0 0 0 0 0 0)
    Body MCP2b: mass=0 mass_center=(0 0 0) inertia=(0 0 0 0 0 0)
    Body PP2: mass=0 mass_center=(0 0 0) inertia=(0 0 0 0 0 0) meshes=bone2_2.vtp
      PhysicalOffsetFrame PP2_imu: socket_parent=.. translation=(0 0 0) [meters]
          orientation=(2.846239 0.239595 -0.8192131) [radians]
        Brick PP2_imu_geom_1: scale_factors=(1 1 1) half_lengths=(0.02 0.01 0.005)
    Body PIP2: mass=0 mass_center=(0 0 0) inertia=(0 0 0 0 0 0)
    Body PM2: mass=0 mass_center=(0 0 0) inertia=(0 0 0 0 0 0) meshes=bone2_3.vtp
      PhysicalOffsetFrame PM2_imu: socket_parent=.. translation=(0 0 0) orientation=(2.833269 -0.2991918 0.9125153)
        Brick PM2_imu_geom_1: scale_factors=(1 1 1) half_lengths=(0.02 0.01 0.005)
    Body DIP2: mass=0 mass_center=(0 0 0) inertia=(0 0 0 0 0 0)
    Body PD2: mass=0 mass_center=(0 0 0) inertia=(0 0 0 0 0 0) meshes=bone2_4.vtp
    Body CMC1a: mass=0 mass_center=(0 0 0) inertia=(0 0 0 0 0 0)
    Body CMC1b: mass=0 mass_center=(0 0 0) inertia=(0 0 0 0 0 0)
    Body MC1: mass=0 mass_center=(0 0 0) inertia=(0 0 0 0 0 0) meshes=bone1_1.vtp
    Body MCP1a: mass=0 mass_center=(0 0 0) inertia=(0 0 0 0 0 0)
    Body MCP1b: mass=0 mass_center=(0 0 0) inertia=(0 0 0 0 0 0)
    Body PP1: mass=0 mass_center=(0 0 0) inertia=(0 0 0 0 0 0) meshes=bone1_2.vtp
    Body IP1: mass=0 mass_center=(0 0 0) inertia=(0 0 0 0 0 0)
    Body PD1: mass=0 mass_center=(0 0 0) inertia=(0 0 0 0 0 0) meshes=bone1_3.vtp
    Body IMC3: mass=0 mass_center=(0 0 0) inertia=(0 0 0 0 0 0)
    Body MC3: mass=0 mass_center=(0 0 0) inertia=(0 0 0 0 0 0) meshes=bone3_1.vtp
      PhysicalOffsetFrame MC3_imu: socket_parent=.. translation=(0 0 0) orientation=(-0.2336736 -0.01811119 0.3709)
        Brick MC3_imu_geom_1: scale_factors=(1 1 1) half_lengths=(0.02 0.01 0.005)
    Body MCP3a: mass=0 mass_center=(0 0 0) inertia=(0 0 0 0 0 0)
    Body MCP3b: mass=0 mass_center=(0 0 0) inertia=(0 0 0 0 0 0)
    Body PP3: mass=0 mass_center=(0 0 0) inertia=(0 0 0 0 0 0) meshes=bone3_2.vtp
    Body PIP3: mass=0 mass_center=(0 0 0) inertia=(0 0 0 0 0 0)
    Body PM3: mass=0 mass_center=(0 0 0) inertia=(0 0 0 0 0 0) meshes=bone3_3.vtp
    Body DIP3: mass=0 mass_center=(0 0 0) inertia=(0 0 0 0 0 0)
    Body PD3: mass=0 mass_center=(0 0 0) inertia=(0 0 0 0 0 0) meshes=bone3_4.vtp
    Body IMC4: mass=0 mass_center=(0 0 0) inertia=(0 0 0 0 0 0)
    Body MC4: mass=0 mass_center=(0 0 0) inertia=(0 0 0 0 0 0) meshes=bone4_1.vtp
    Body MCP4a: mass=0 mass_center=(0 0 0) inertia=(0 0 0 0 0 0)
    Body MCP4b: mass=0 mass_center=(0 0 0) inertia=(0 0 0 0 0 0)
    Body PP4: mass=0 mass_center=(0 0 0) inertia=(0 0 0 0 0 0) meshes=bone4_2.vtp
    Body PIP4: mass=0 mass_center=(0 0 0) inertia=(0 0 0 0 0 0)
    Body PM4: mass=0 mass_center=(0 0 0) inertia=(0 0 0 0 0 0) meshes=bone4_3.vtp
    Body DIP4: mass=0 mass_center=(0 0 0) inertia=(0 0 0 0 0 0)
    Body PD4: mass=0 mass_center=(0 0 0) inertia=(0 0 0 0 0 0) meshes=bone4_4.vtp
    Body IMC5: mass=0 mass_center=(0 0 0) inertia=(0 0 0 0 0 0)
    Body MC5: mass=0 mass_center=(0 0 0) inertia=(0 0 0 0 0 0) meshes=bone5_1.vtp
    Body MCP5a: mass=0 mass_center=(0 0 0) inertia=(0 0 0 0 0 0)
    Body MCP5b: mass=0 mass_center=(0 0 0) inertia=(0 0 0 0 0 0)
    Body PP5: mass=0 mass_center=(0 0 0) inertia=(0 0 0 0 0 0) meshes=bone5_2.vtp
    Body PIP5: mass=0 mass_center=(0 0 0) inertia=(0 0 0 0 0 0)
    Body PM5: mass=0 mass_center=(0 0 0) inertia=(0 0 0 0 0 0) meshes=bone5_3.vtp
    Body DIP5: mass=0 mass_center=(0 0 0) inertia=(0 0 0 0 0 0)
    Body PD5: mass=0 mass_center=(0 0 0) inertia=(0 0 0 0 0 0) meshes=bone5_4.vtp
  JointSet:
    CustomJoint MCP2a: socket_parent_frame=ground_offset socket_child_frame=MCP2a_offset
      Coordinate MCP2a: default_value=0.8552113 range=(-0.55 1.373) clamped=false
      PhysicalOffsetFrame ground_offset: socket_parent=/ground translation=(0.00112756 -0.02894 -0.00258697)
          orientation=(-2.97153 0.173733 1.59226)
      PhysicalOffsetFrame MCP2a_offset: socket_parent=/bodyset/MCP2a translation=(0 0 0)
      SpatialTransform: axes_held_at_zero=(rotation2 rotation3 translation1 translation2 translation3)
        TransformAxis rotation1: coordinates=MCP2a axis=(0 0 1) LinearFunction(coefficients=1 0)
    CustomJoint MCP2b: socket_parent_frame=MCP2a_offset socket_child_frame=MCP2b_offset
      Coordinate MCP2b: default_value=0.3141593 range=(-0.323 0.871) clamped=false
      PhysicalOffsetFrame MCP2a_offset: socket_parent=/bodyset/MCP2a translation=(0 0 0)
          orientation=(-1.5708 -0.0395268 1.84402)
      PhysicalOffsetFrame MCP2b_offset: socket_parent=/bodyset/MCP2b translation=(0 0 0)
      SpatialTransform: axes_held_at_zero=(rotation2 rotation3 translation1 translation2 translation3)
        TransformAxis rotation1: coordinates=MCP2b axis=(0 0 1) LinearFunction(coefficients=1 0)
    WeldJoint PP2: socket_parent_frame=MCP2b_offset socket_child_frame=PP2_offset
      PhysicalOffsetFrame MCP2b_offset: socket_parent=/bodyset/MCP2b translation=(-0.0126695 -0.0178486 -0.0200113)
          orientation=(2.38942 1.09476 -1.49733)
      PhysicalOffsetFrame PP2_offset: socket_parent=/bodyset/PP2 translation=(0 0 0)
    CustomJoint PIP2: socket_parent_frame=PP2_offset socket_child_frame=PIP2_offset
      Coordinate PIP2: default_value=0.4014257 range=(-1.638 0.541) clamped=false
      PhysicalOffsetFrame PP2_offset: socket_parent=/bodyset/PP2 translation=(0.00266634 -0.0177015 0.00149144)
          orientation=(3.02408 0.326035 -2.45465)
      PhysicalOffsetFrame PIP2_offset: socket_parent=/bodyset/PIP2 translation=(0 0 0)
      SpatialTransform: axes_held_at_zero=(rotation2 rotation3 translation1 translation2 translation3)
        TransformAxis rotation1: coordinates=PIP2 axis=(0 0 1) LinearFunction(coefficients=1 0)
    WeldJoint PM2: socket_parent_frame=PIP2_offset socket_child_frame=PM2_offset
      PhysicalOffsetFrame PIP2_offset: socket_parent=/bodyset/PIP2 translation=(-0.0143045 -0.00863928 0.00285207)
          orientation=(2.84757 0.0199408 -2.10444)
      PhysicalOffsetFrame PM2_offset: socket_parent=/bodyset/PM2 translation=(0 0 0)
    CustomJoint DIP2: socket_parent_frame=PM2_offset socket_child_frame=DIP2_offset
      Coordinate DIP2: default_value=0.3141593 range=(-1.066 1.129) clamped=false
      PhysicalOffsetFrame PM2_offset: socket_parent=/bodyset/PM2 translation=(0.00114957 -0.011678 0.00171634)
          orientation=(3.10919 0.0591067 -2.13892)
      PhysicalOffsetFrame DIP2_offset: socket_parent=/bodyset/DIP2 translation=(0 0 0)
      SpatialTransform: axes_held_at_zero=(rotation2 rotation3 translation1 translation2 translation3)
        TransformAxis rotation1: coordinates=DIP2 axis=(0 0 1) LinearFunction(coefficients=1 0)
    WeldJoint PD2: socket_parent_frame=DIP2_offset socket_child_frame=PD2_offset
      PhysicalOffsetFrame DIP2_offset: socket_parent=/bodyset/DIP2 translation=(-0.0108529 -0.00165782 0.00180878)
          orientation=(-3.12873 -0.0511282 -1.84226)
      PhysicalOffsetFrame PD2_offset: socket_parent=/bodyset/PD2 translation=(0 0 0)
    CustomJoint CMC1a: socket_parent_frame=ground_offset socket_child_frame=CMC1a_offset
      Coordinate CMC1a: default_value=0.03490659 range=(-0.929 0.27) clamped=false
      PhysicalOffsetFrame ground_offset: socket_parent=/ground translation=(0.0195011 0.0269507 0.00443441)
          orientation=(2.48728 -0.147547 0.428885)
      PhysicalOffsetFrame CMC1a_offset: socket_parent=/bodyset/CMC1a translation=(0 0 0)
      SpatialTransform: axes_held_at_zero=(rotation2 rotation3 translation1 translation2 translation3)
        TransformAxis rotation1: coordinates=CMC1a axis=(0 0 1) LinearFunction(coefficients=1 0)
    CustomJoint CMC1b: socket_parent_frame=CMC1a_offset socket_child_frame=CMC1b_offset
      Coordinate CMC1b: default_value=0.1859884 range=(-0.675 0.186) clamped=false
      PhysicalOffsetFrame CMC1a_offset: socket_parent=/bodyset/CMC1a translation=(-0.0173718 -0.00971473 9e-8)
          orientation=(-1.38516 -0.502558 0.656919)
      PhysicalOffsetFrame CMC1b_offset: socket_parent=/bodyset/CMC1b translation=(0 0 0)
      SpatialTransform: axes_held_at_zero=(rotation2 rotation3 translation1 translation2 translation3)
        TransformAxis rotation1: coordinates=CMC1b axis=(0 0 1) LinearFunction(coefficients=1 0)
    WeldJoint MC1: socket_parent_frame=CMC1b_offset socket_child_frame=MC1_offset
      PhysicalOffsetFrame CMC1b_offset: socket_parent=/bodyset/CMC1b translation=(0.0335485 -0.012483 0.0121645)
          orientation=(-2.86225 0.851654 1.94658)
      PhysicalOffsetFrame MC1_offset: socket_parent=/bodyset/MC1 translation=(0 0 0)
    CustomJoint MCP1a: socket_parent_frame=MC1_offset socket_child_frame=MCP1a_offset
      Coordinate MCP1a: default_value=0.6457718 range=(-0.361 1.254) clamped=false
      PhysicalOffsetFrame MC1_offset: socket_parent=/bodyset/MC1 translation=(0.00137157 -0.0177992 -0.00084812)
          orientation=(3.0539 -0.00793818 0.180446)
      PhysicalOffsetFrame MCP1a_offset: socket_parent=/bodyset/MCP1a translation=(0 0 0)
      SpatialTransform: axes_held_at_zero=(rotation2 rotation3 translation1 translation2 translation3)
        TransformAxis rotation1: coordinates=MCP1a axis=(0 0 1) LinearFunction(coefficients=1 0)
    CustomJoint MCP1b: socket_parent_frame=MCP1a_offset socket_child_frame=MCP1b_offset
      Coordinate MCP1b: default_value=0.1047198 range=(-0.392 0.799) clamped=false
      PhysicalOffsetFrame MCP1a_offset: socket_parent=/bodyset/MCP1a translation=(0 0 0)
          orientation=(1.57075 -1.50024 -1.40702)
      PhysicalOffsetFrame MCP1b_offset: socket_parent=/bodyset/MCP1b translation=(0 0 0)
      SpatialTransform: axes_held_at_zero=(rotation2 rotation3 translation1 translation2 translation3)
        TransformAxis rotation1: coordinates=MCP1b axis=(0 0 1) LinearFunction(coefficients=1 0)
    WeldJoint PP1: socket_parent_frame=MCP1b_offset socket_child_frame=PP1_offset
      PhysicalOffsetFrame MCP1b_offset: socket_parent=/bodyset/MCP1b translation=(-0.00881935 -0.0147195 -0.0173328)
          orientation=(1.57582 1.03341 -0.709049)
      PhysicalOffsetFrame PP1_offset: socket_parent=/bodyset/PP1 translation=(0 0 0)
    CustomJoint IP1: socket_parent_frame=PP1_offset socket_child_frame=IP1_offset
      Coordinate IP1: default_value=0.5759587 range=(-0.79 1.003) clamped=false
      PhysicalOffsetFrame PP1_offset: socket_parent=/bodyset/PP1 translation=(0.00191091 -0.0136391 0.00135957)
          orientation=(3.12122 -0.273414 2.99378)
      PhysicalOffsetFrame IP1_offset: socket_parent=/bodyset/IP1 translation=(0 0 0)
      SpatialTransform: axes_held_at_zero=(rotation2 rotation3 translation1 translation2 translation3)
        TransformAxis rotation1: coordinates=IP1 axis=(0 0 1) LinearFunction(coefficients=1 0)
    WeldJoint PD1: socket_parent_frame=IP1_offset socket_child_frame=PD1_offset
      PhysicalOffsetFrame IP1_offset: socket_parent=/bodyset/IP1 translation=(-0.0076659 -0.0141063 0.00128191)
          orientation=(-3.09546 -0.146374 -2.76068)
      PhysicalOffsetFrame PD1_offset: socket_parent=/bodyset/PD1 translation=(0 0 0)
    CustomJoint IMC3: socket_parent_frame=ground_offset socket_child_frame=IMC3_offset
      Coordinate IMC3: default_value=-0.06981317 range=(-0.076 0.27) clamped=false
      PhysicalOffsetFrame ground_offset: socket_parent=/ground translation=(0.000273 0.0196767 -0.00381503)
          orientation=(1.77115 -0.0846886 0.103585)
      PhysicalOffsetFrame IMC3_offset: socket_parent=/bodyset/IMC3 translation=(0 0 0)
      SpatialTransform: axes_held_at_zero=(rotation2 rotation3 translation1 translation2 translation3)
        TransformAxis rotation1: coordinates=IMC3 axis=(0 0 1) LinearFunction(coefficients=1 0)
    WeldJoint MC3: socket_parent_frame=IMC3_offset socket_child_frame=MC3_offset
      PhysicalOffsetFrame IMC3_offset: socket_parent=/bodyset/IMC3 translation=(-0.00495342 -0.00967755 0.0199745)
          orientation=(-1.55663 0.0736012 0.0246025)
      PhysicalOffsetFrame MC3_offset: socket_parent=/bodyset/MC3 translation=(0 0 0)
    CustomJoint MCP3a: socket_parent_frame=MC3_offset socket_child_frame=MCP3a_offset
      Coordinate MCP3a: default_value=0.7330383 range=(-0.691 1.365) clamped=false
      PhysicalOffsetFrame MC3_offset: socket_parent=/bodyset/MC3 translation=(0.00248792 -0.0278852 0.00056535)
          orientation=(-3.06482 0.181191 2.34162)
      PhysicalOffsetFrame MCP3a_offset: socket_parent=/bodyset/MCP3a translation=(0 0 0)
      SpatialTransform: axes_held_at_zero=(rotation2 rotation3 translation1 translation2 translation3)
        TransformAxis rotation1: coordinates=MCP3a axis=(0 0 1) LinearFunction(coefficients=1 0)
    CustomJoint MCP3b: socket_parent_frame=MCP3a_offset socket_child_frame=MCP3b_offset
      Coordinate MCP3b: default_value=0.2617994 range=(-0.361 0.379) clamped=false
      PhysicalOffsetFrame MCP3a_offset: socket_parent=/bodyset/MCP3a translation=(0 0 0)
          orientation=(-1.5708 0.737407 1.70278)
      PhysicalOffsetFrame MCP3b_offset: socket_parent=/bodyset/MCP3b translation=(0 0 0)
      SpatialTransform: axes_held_at_zero=(rotation2 rotation3 translation1 translation2 translation3)
        TransformAxis rotation1: coordinates=MCP3b axis=(0 0 1) LinearFunction(coefficients=1 0)
    WeldJoint PP3: socket_parent_frame=MCP3b_offset socket_child_frame=PP3_offset
      PhysicalOffsetFrame MCP3b_offset: socket_parent=/bodyset/MCP3b translation=(-0.00585579 -0.0226329 -0.0221663)
          orientation=(2.83025 1.38722 -2.01568)
      PhysicalOffsetFrame PP3_offset: socket_parent=/bodyset/PP3 translation=(0 0 0)
    CustomJoint PIP3: socket_parent_frame=PP3_offset socket_child_frame=PIP3_offset
      Coordinate PIP3: default_value=0.5759587 range=(-1.419 0.803) clamped=false
      PhysicalOffsetFrame PP3_offset: socket_parent=/bodyset/PP3 translation=(0.00297529 -0.0198371 0.00041341)
          orientation=(-3.10128 0.0516092 1.81548)
      PhysicalOffsetFrame PIP3_offset: socket_parent=/bodyset/PIP3 translation=(0 0 0)
      SpatialTransform: axes_held_at_zero=(rotation2 rotation3 translation1 translation2 translation3)
        TransformAxis rotation1: coordinates=PIP3 axis=(0 0 1) LinearFunction(coefficients=1 0)
    WeldJoint PM3: socket_parent_frame=PIP3_offset socket_child_frame=PM3_offset
      PhysicalOffsetFrame PIP3_offset: socket_parent=/bodyset/PIP3 translation=(0.0128016 -0.0146496 0.00044222)
          orientation=(-3.10704 -0.035765 2.41416)
      PhysicalOffsetFrame PM3_offset: socket_parent=/bodyset/PM3 translation=(0 0 0)
    CustomJoint DIP3: socket_parent_frame=PM3_offset socket_child_frame=DIP3_offset
      Coordinate DIP3: default_value=0.3316126 range=(-1.206 0.698) clamped=false
      PhysicalOffsetFrame PM3_offset: socket_parent=/bodyset/PM3 translation=(0.00011917 -0.0136876 -0.00012773)
          orientation=(-3.06295 0.295096 2.62405)
      PhysicalOffsetFrame DIP3_offset: socket_parent=/bodyset/DIP3 translation=(0 0 0)
      SpatialTransform: axes_held_at_zero=(rotation2 rotation3 translation1 translation2 translation3)
        TransformAxis rotation1: coordinates=DIP3 axis=(0 0 1) LinearFunction(coefficients=1 0)
    WeldJoint PD3: socket_parent_frame=DIP3_offset socket_child_frame=PD3_offset
      PhysicalOffsetFrame DIP3_offset: socket_parent=/bodyset/DIP3 translation=(0.00232482 -0.0125987 0.00071799)
          orientation=(3.05395 -0.272227 2.95387)
      PhysicalOffsetFrame PD3_offset: socket_parent=/bodyset/PD3 translation=(0 0 0)
    CustomJoint IMC4: socket_parent_frame=MC3_offset socket_child_frame=IMC4_offset
      Coordinate IMC4: default_value=-0.06981317 range=(-0.085 0.276) clamped=false
      PhysicalOffsetFrame MC3_offset: socket_parent=/bodyset/MC3 translation=(0.00060402 0.0284098 -0.0080106)
          orientation=(1.27409 -0.192796 0.142861)
      PhysicalOffsetFrame IMC4_offset: socket_parent=/bodyset/IMC4 translation=(0 0 0)
      SpatialTransform: axes_held_at_zero=(rotation2 rotation3 translation1 translation2 translation3)
        TransformAxis rotation1: coordinates=IMC4 axis=(0 0 1) LinearFunction(coefficients=1 0)
    WeldJoint MC4: socket_parent_frame=IMC4_offset socket_child_frame=MC4_offset
      PhysicalOffsetFrame IMC4_offset: socket_parent=/bodyset/IMC4 translation=(0.0030355 -0.0128709 0.0224319)
          orientation=(-1.14607 0.0811775 0.237989)
      PhysicalOffsetFrame MC4_offset: socket_parent=/bodyset/MC4 translation=(0 0 0)
    CustomJoint MCP4a: socket_parent_frame=MC4_offset socket_child_frame=MCP4a_offset
      Coordinate MCP4a: default_value=0.418879 range=(-1.052 1.18) clamped=false
      PhysicalOffsetFrame MC4_offset: socket_parent=/bodyset/MC4 translation=(0.00073153 -0.0248122 -0.00146137)
          orientation=(-3.02999 0.0063905 0.114275)
      PhysicalOffsetFrame MCP4a_offset: socket_parent=/bodyset/MCP4a translation=(0 0 0)
      SpatialTransform: axes_held_at_zero=(rotation2 rotation3 translation1 translation2 translation3)
        TransformAxis rotation1: coordinates=MCP4a axis=(0 0 1) LinearFunction(coefficients=1 0)
    CustomJoint MCP4b: socket_parent_frame=MCP4a_offset socket_child_frame=MCP4b_offset
      Coordinate MCP4b: default_value=0.1047198 range=(-0.478 0.299) clamped=false
      PhysicalOffsetFrame MCP4a_offset: socket_parent=/bodyset/MCP4a translation=(0 0 0)
          orientation=(1.5708 -1.09804 -0.889585)
      PhysicalOffsetFrame MCP4b_offset: socket_parent=/bodyset/MCP4b translation=(0 0 0)
      SpatialTransform: axes_held_at_zero=(rotation2 rotation3 translation1 translation2 translation3)
        TransformAxis rotation1: coordinates=MCP4b axis=(0 0 1) LinearFunction(coefficients=1 0)
    WeldJoint PP4: socket_parent_frame=MCP4b_offset socket_child_frame=PP4_offset
      PhysicalOffsetFrame MCP4b_offset: socket_parent=/bodyset/MCP4b translation=(-0.00768566 -0.0150871 -0.0240537)
          orientation=(1.46951 1.04701 -0.522056)
      PhysicalOffsetFrame PP4_offset: socket_parent=/bodyset/PP4 translation=(0 0 0)
    CustomJoint PIP4: socket_parent_frame=PP4_offset socket_child_frame=PIP4_offset
      Coordinate PIP4: default_value=0.6283185 range=(-1.379 0.902) clamped=false
      PhysicalOffsetFrame PP4_offset: socket_parent=/bodyset/PP4 translation=(0.00013924 -0.0188588 -0.00029457)
          orientation=(3.14059 0.0151074 -3.0091)
      PhysicalOffsetFrame PIP4_offset: socket_parent=/bodyset/PIP4 translation=(0 0 0)
      SpatialTransform: axes_held_at_zero=(rotation2 rotation3 translation1 translation2 translation3)
        TransformAxis rotation1: coordinates=PIP4 axis=(0 0 1) LinearFunction(coefficients=1 0)
    WeldJoint PM4: socket_parent_frame=PIP4_offset socket_child_frame=PM4_offset
      PhysicalOffsetFrame PIP4_offset: socket_parent=/bodyset/PIP4 translation=(-0.0119595 -0.0147067 -0.00124534)
          orientation=(-3.066 0.0801836 -2.4148)
      PhysicalOffsetFrame PM4_offset: socket_parent=/bodyset/PM4 translation=(0 0 0)
    CustomJoint DIP4: socket_parent_frame=PM4_offset socket_child_frame=DIP4_offset
      Coordinate DIP4: default_value=0.5759587 range=(-0.965 0.987) clamped=false
      PhysicalOffsetFrame PM4_offset: socket_parent=/bodyset/PM4 translation=(0.00020388 -0.0130428 0.00054321)
          orientation=(-3.13802 -0.0382843 -2.95545)
      PhysicalOffsetFrame DIP4_offset: socket_parent=/bodyset/DIP4 translation=(0 0 0)
      SpatialTransform: axes_held_at_zero=(rotation2 rotation3 translation1 translation2 translation3)
        TransformAxis rotation1: coordinates=DIP4 axis=(0 0 1) LinearFunction(coefficients=1 0)
    WeldJoint PD4: socket_parent_frame=DIP4_offset socket_child_frame=PD4_offset
      PhysicalOffsetFrame DIP4_offset: socket_parent=/bodyset/DIP4 translation=(-0.00880145 -0.00893865 -0.00069371)
          orientation=(-3.09416 0.0530422 -2.43283)
      PhysicalOffsetFrame PD4_offset: socket_parent=/bodyset/PD4 translation=(0 0 0)
    CustomJoint IMC5: socket_parent_frame=MC4_offset socket_child_frame=IMC5_offset
      Coordinate IMC5: default_value=-0.2617994 range=(-0.265 0.135) clamped=false
      PhysicalOffsetFrame MC4_offset: socket_parent=/bodyset/MC4 translation=(0.00133314 0.0223894 -0.00555069)
          orientation=(1.42155 -0.0326685 0.0281242)
      PhysicalOffsetFrame IMC5_offset: socket_parent=/bodyset/IMC5 translation=(0 0 0)
      SpatialTransform: axes_held_at_zero=(rotation2 rotation3 translation1 translation2 translation3)
        TransformAxis rotation1: coordinates=IMC5 axis=(0 0 1) LinearFunction(coefficients=1 0)
    WeldJoint MC5: socket_parent_frame=IMC5_offset socket_child_frame=MC5_offset
      PhysicalOffsetFrame IMC5_offset: socket_parent=/bodyset/IMC5 translation=(0.00258619 -0.0143344 0.0176516)
          orientation=(-1.28525 0.0142244 0.0541369)
      PhysicalOffsetFrame MC5_offset: socket_parent=/bodyset/MC5 translation=(0 0 0)
    CustomJoint MCP5a: socket_parent_frame=MC5_offset socket_child_frame=MCP5a_offset
      Coordinate MCP5a: default_value=0.1047198 range=(-0.65 0.305) clamped=false
      PhysicalOffsetFrame MC5_offset: socket_parent=/bodyset/MC5 translation=(0.00175437 -0.0234668 0.00120119)
          orientation=(-1.593 -1.08354 -1.10326)
      PhysicalOffsetFrame MCP5a_offset: socket_parent=/bodyset/MCP5a translation=(0 0 0)
      SpatialTransform: axes_held_at_zero=(rotation2 rotation3 translation1 translation2 translation3)
        TransformAxis rotation1: coordinates=MCP5a axis=(0 0 1) LinearFunction(coefficients=1 0)
    CustomJoint MCP5b: socket_parent_frame=MCP5a_offset socket_child_frame=MCP5b_offset
      Coordinate MCP5b: default_value=0.296706 range=(-1.472 1.213) clamped=false
      PhysicalOffsetFrame MCP5a_offset: socket_parent=/bodyset/MCP5a translation=(0 0 0)
          orientation=(-1.57079 -1.1796 1.84235)
      PhysicalOffsetFrame MCP5b_offset: socket_parent=/bodyset/MCP5b translation=(0 0 0)
      SpatialTransform: axes_held_at_zero=(rotation2 rotation3 translation1 translation2 translation3)
        TransformAxis rotation1: coordinates=MCP5b axis=(0 0 1) LinearFunction(coefficients=1 0)
    WeldJoint PP5: socket_parent_frame=MCP5b_offset socket_child_frame=PP5_offset
      PhysicalOffsetFrame MCP5b_offset: socket_parent=/bodyset/MCP5b translation=(0.0191544 0.0145138 -0.00058784)
          orientation=(3.06603 -0.0222645 0.987851)
      PhysicalOffsetFrame PP5_offset: socket_parent=/bodyset/PP5 translation=(0 0 0)
    CustomJoint PIP5: socket_parent_frame=PP5_offset socket_child_frame=PIP5_offset
      Coordinate PIP5: default_value=0 range=(-1.846 0.253) clamped=false
      PhysicalOffsetFrame PP5_offset: socket_parent=/bodyset/PP5 translation=(0.00101144 -0.0155022 -0.00049949)
          orientation=(-3.09077 0.22128 2.69172)
      PhysicalOffsetFrame PIP5_offset: socket_parent=/bodyset/PIP5 translation=(0 0 0)
      SpatialTransform: axes_held_at_zero=(rotation2 rotation3 translation1 translation2 translation3)
        TransformAxis rotation1: coordinates=PIP5 axis=(0 0 1) LinearFunction(coefficients=1 0)
    WeldJoint PM5: socket_parent_frame=PIP5_offset socket_child_frame=PM5_offset
      PhysicalOffsetFrame PIP5_offset: socket_parent=/bodyset/PIP5 translation=(0.00633628 -0.0134826 -0.00081588)
          orientation=(-3.08756 -0.0289347 2.67523)
      PhysicalOffsetFrame PM5_offset: socket_parent=/bodyset/PM5 translation=(0 0 0)
    CustomJoint DIP5: socket_parent_frame=PM5_offset socket_child_frame=DIP5_offset
      Coordinate DIP5: default_value=0.08726646 range=(-1.439 0.369) clamped=false
      PhysicalOffsetFrame PM5_offset: socket_parent=/bodyset/PM5 translation=(0.0001806 -0.0100592 -0.00268002)
          orientation=(3.11811 -0.0707485 2.50092)
      PhysicalOffsetFrame DIP5_offset: socket_parent=/bodyset/DIP5 translation=(0 0 0)
      SpatialTransform: axes_held_at_zero=(rotation2 rotation3 translation1 translation2 translation3)
        TransformAxis rotation1: coordinates=DIP5 axis=(0 0 1) LinearFunction(coefficients=1 0)
    WeldJoint PD5: socket_parent_frame=DIP5_offset socket_child_frame=PD5_offset
      PhysicalOffsetFrame DIP5_offset: socket_parent=/bodyset/DIP5 translation=(0.00488881 -0.0101718 -0.00487303)
          orientation=(-2.93711 0.0150708 2.62733)
      PhysicalOffsetFrame PD5_offset: socket_parent=/bodyset/PD5 translation=(0 0 0)
