# OpenSim document version 40000
Model:
  Ground
  BodySet:
    Body GND: mass=1 [kg] inertia=(0.01 0.01 0.01 0 0 0)
    Body WRIST: mass=0.0001 inertia=(1e-6 1e-6 1e-6 0 0 0)
      PhysicalOffsetFrame proximal_row_geom_1_offset: socket_parent=.. translation=(0 0 0) [meters]
          orientation=(-1.579522 0.1229111 1.515519) [radians]
          meshes=c:\Users\valer\Downloads\ARMS_Wrist_Hand_Model_4.3\Geometry\lunate.vtp
      PhysicalOffsetFrame proximal_row_geom_2_offset: socket_parent=.. translation=(0 0 0)
          orientation=(-1.579522 0.1229111 1.515519)
          meshes=c:\Users\valer\Downloads\ARMS_Wrist_Hand_Model_4.3\Geometry\sdfastSCAPHOIDw.vtp
      PhysicalOffsetFrame proximal_row_geom_3_offset: socket_parent=.. translation=(0 0 0)
          orientation=(-1.579522 0.1229111 1.515519)
          meshes=c:\Users\valer\Downloads\ARMS_Wrist_Hand_Model_4.3\Geometry\sdfastPISIFORMw.vtp
      PhysicalOffsetFrame proximal_row_geom_4_offset: socket_parent=.. translation=(0 0 0)
          orientation=(-1.579522 0.1229111 1.515519)
          meshes=c:\Users\valer\Downloads\ARMS_Wrist_Hand_Model_4.3\Geometry\sdfastTRIQUETRALw.vtp
      PhysicalOffsetFrame capitate_geom_1_offset: socket_parent=.. translation=(0.01542189 0.0004119724 -0.003157925)
          orientation=(-1.579523 0.1229112 1.515519)
          meshes=c:\Users\valer\Downloads\ARMS_Wrist_Hand_Model_4.3\Geometry\capitate.vtp
      PhysicalOffsetFrame trapezium_geom_1_offset: socket_parent=.. translation=(0.01952419 -0.01061172 -0.01807947)
          orientation=(-1.579523 0.1229112 1.515519)
          meshes=c:\Users\valer\Downloads\ARMS_Wrist_Hand_Model_4.3\Geometry\trapezium.vtp
      PhysicalOffsetFrame trapezoid_geom_1_offset: socket_parent=.. translation=(0.01964623 -0.002670228 -0.01203597)
          orientation=(-1.579523 0.1229112 1.515519)
          meshes=c:\Users\valer\Downloads\ARMS_Wrist_Hand_Model_4.3\Geometry\trapezoid.vtp
      PhysicalOffsetFrame hamate_geom_1_offset: socket_parent=.. translation=(0.01720092 -0.0004667193 0.007940274)
          orientation=(-1.579523 0.1229112 1.515519)
          meshes=c:\Users\valer\Downloads\ARMS_Wrist_Hand_Model_4.3\Geometry\hamate.vtp
    Body MC5: mass=0.02962963 inertia=(0.0002962963 0.0002962963 0.0002962963 0 0 0)
      PhysicalOffsetFrame fifthmc_geom_1_offset: socket_parent=.. translation=(0 0 0)
          orientation=(-9.204876e-17 -2.428613e-17 -2.081668e-17)
          meshes=c:\Users\valer\Downloads\ARMS_Wrist_Hand_Model_4.3\Geometry\5mc_new.vtp
    Body PP5: mass=0.01106 inertia=(0.0001106 0.0001106 0.0001106 0 0 0)
      PhysicalOffsetFrame 5proxph_geom_1_offset: socket_parent=.. translation=(0 0 0)
          orientation=(-9.204876e-17 -2.428613e-17 -2.081668e-17)
          meshes=c:\Users\valer\Downloads\ARMS_Wrist_Hand_Model_4.3\Geometry\5proxph_new.vtp
    Body PM5: mass=0.00372 inertia=(3.72e-5 3.72e-5 3.72e-5 0 0 0)
      PhysicalOffsetFrame 5midph_geom_1_offset: socket_parent=.. translation=(0 0 0)
          orientation=(-8.489303e-17 3.122502e-17 1.387779e-17)
          meshes=c:\Users\valer\Downloads\ARMS_Wrist_Hand_Model_4.3\Geometry\5midph_new.vtp
    Body PD5: mass=0.00222 inertia=(2.22e-5 2.22e-5 2.22e-5 0 0 0)
      PhysicalOffsetFrame 5distph_geom_1_offset: socket_parent=.. translation=(0 0 0)
          orientation=(-5.692061e-18 -1.734723e-17 -2.081668e-17)
          meshes=c:\Users\valer\Downloads\ARMS_Wrist_Hand_Model_4.3\Geometry\5distph_new.vtp
    Body MC4: mass=0.03333333 inertia=(0.0003333333 0.0003333333 0.0003333333 0 0 0)
      PhysicalOffsetFrame fourthmc_geom_1_offset: socket_parent=.. translation=(0 0 0)
          orientation=(3.735076e-17 7.285839e-17 -4.857226e-17)
          meshes=c:\Users\valer\Downloads\ARMS_Wrist_Hand_Model_4.3\Geometry\4mc_new.vtp
    Body PP4: mass=0.01374 inertia=(0.0001374 0.0001374 0.0001374 0 0 0)
      PhysicalOffsetFrame 4proxph_geom_1_offset: socket_parent=.. translation=(0 0 0)
          orientation=(3.735076e-17 7.285839e-17 -4.857226e-17)
          meshes=c:\Users\valer\Downloads\ARMS_Wrist_Hand_Model_4.3\Geometry\4proxph_new.vtp
    Body PM4: mass=0.00568 inertia=(5.68e-5 5.68e-5 5.68e-5 0 0 0)
      PhysicalOffsetFrame 4midph_geom_1_offset: socket_parent=.. translation=(0 0 0)
          orientation=(3.735076e-17 7.285839e-17 -4.857226e-17)
          meshes=c:\Users\valer\Downloads\ARMS_Wrist_Hand_Model_4.3\Geometry\4midph_new.vtp
    Body PD4: mass=0.0029 inertia=(2.9e-5 2.9e-5 2.9e-5 0 0 0)
      PhysicalOffsetFrame 4distph_geom_1_offset: socket_parent=.. translation=(0 0 0)
          orientation=(3.735076e-17 7.285839e-17 -4.857226e-17)
          meshes=c:\Users\valer\Downloads\ARMS_Wrist_Hand_Model_4.3\Geometry\4distph_new.vtp
    Body MC3: mass=0.03809524 inertia=(0.0003809524 0.0003809524 0.0003809524 0 0 0)
      PhysicalOffsetFrame thirdmc_geom_1_offset: socket_parent=.. translation=(0 0 0)
          orientation=(5.605325e-17 -5.551115e-17 0)
          meshes=c:\Users\valer\Downloads\ARMS_Wrist_Hand_Model_4.3\Geometry\3mc.vtp
    Body PP3: mass=0.0193 inertia=(0.000193 0.000193 0.000193 0 0 0)
      PhysicalOffsetFrame 3proxph_geom_1_offset: socket_parent=.. translation=(0 0 0)
          orientation=(5.529431e-18 -3.989864e-17 1.387779e-17)
          meshes=c:\Users\valer\Downloads\ARMS_Wrist_Hand_Model_4.3\Geometry\3proxph.vtp
    Body PM3: mass=0.00642 inertia=(6.42e-5 6.42e-5 6.42e-5 0 0 0)
      PhysicalOffsetFrame 3midph_geom_1_offset: socket_parent=.. translation=(0 0 0)
          orientation=(5.529431e-18 -3.989864e-17 1.387779e-17)
          meshes=c:\Users\valer\Downloads\ARMS_Wrist_Hand_Model_4.3\Geometry\3midph.vtp
    Body PD3: mass=0.00252 inertia=(2.52e-5 2.52e-5 2.52e-5 0 0 0)
      PhysicalOffsetFrame 3distph_geom_1_offset: socket_parent=.. translation=(0 0 0)
          orientation=(-1.252254e-17 -5.551115e-17 1.387779e-17)
          meshes=c:\Users\valer\Downloads\ARMS_Wrist_Hand_Model_4.3\Geometry\3distph.vtp
    Body MC2: mass=0.03636364 inertia=(0.0003636364 0.0003636364 0.0003636364 0 0 0)
      PhysicalOffsetFrame secondmc_geom_1_offset: socket_parent=.. translation=(0 0 0)
          orientation=(5.605325e-17 -5.551115e-17 0)
          meshes=c:\Users\valer\Downloads\ARMS_Wrist_Hand_Model_4.3\Geometry\2mc.vtp
    Body PP2: mass=0.0158 inertia=(0.000158 0.000158 0.000158 0 0 0)
      PhysicalOffsetFrame 2proxph_geom_1_offset: socket_parent=.. translation=(0 0 0)
          orientation=(5.529431e-18 -3.989864e-17 1.387779e-17)
          meshes=c:\Users\valer\Downloads\ARMS_Wrist_Hand_Model_4.3\Geometry\2proxph.vtp
    Body PM2: mass=0.0049 inertia=(4.9e-5 4.9e-5 4.9e-5 0 0 0)
      PhysicalOffsetFrame 2midph_geom_1_offset: socket_parent=.. translation=(0 0 0)
          orientation=(-2.753874e-17 -8.673617e-18 -4.857226e-17)
          meshes=c:\Users\valer\Downloads\ARMS_Wrist_Hand_Model_4.3\Geometry\2midph.vtp
    Body PD2: mass=0.0018 inertia=(1.8e-5 1.8e-5 1.8e-5 0 0 0)
      PhysicalOffsetFrame PD2_offset: socket_parent=.. translation=(0 0 0)
          orientation=(-5.594483e-17 -2.775558e-17 -2.081668e-17)
          meshes=c:\Users\valer\Downloads\ARMS_Wrist_Hand_Model_4.3\Geometry\2distph.vtp
    Body MC1: mass=0.016 inertia=(0.00016 0.00016 0.00016 0 0 0)
      PhysicalOffsetFrame firstmc_geom_1_offset: socket_parent=.. translation=(0 0 0)
          orientation=(5.605325e-17 -5.551115e-17 0)
          meshes=c:\Users\valer\Downloads\ARMS_Wrist_Hand_Model_4.3\Geometry\1mc.vtp
    Body PD1: mass=0.0079 inertia=(7.9e-5 7.9e-5 7.9e-5 0 0 0)
      PhysicalOffsetFrame proximal_thumb_geom_1_offset: socket_parent=.. translation=(0 0 0)
          orientation=(5.605325e-17 -5.551115e-17 0)
          meshes=c:\Users\valer\Downloads\ARMS_Wrist_Hand_Model_4.3\Geometry\thumbprox.vtp
    Body PP1: mass=0.0031 inertia=(3.1e-5 3.1e-5 3.1e-5 0 0 0)
      PhysicalOffsetFrame distal_thumb_geom_1_offset: socket_parent=.. translation=(0 0 0)
          orientation=(5.605325e-17 -5.551115e-17 0)
          meshes=c:\Users\valer\Downloads\ARMS_Wrist_Hand_Model_4.3\Geometry\thumbdist.vtp
  JointSet:
    WeldJoint GND_to_ground: socket_parent_frame=ground_offset socket_child_frame=GND_offset
      PhysicalOffsetFrame ground_offset: socket_parent=/ground translation=(0 0 0)
          orientation=(-2.245568e-10 9.962255e-19 -4.436408e-9)
      PhysicalOffsetFrame GND_offset: socket_parent=/bodyset/GND
    GimbalJoint wrist: socket_parent_frame=GND_offset socket_child_frame=WRIST_offset
      Coordinate wrist_roll: default_value=0 range=(-3.14 3.14)
      Coordinate wrist_yaw: default_value=0 range=(-3.14 3.14)
      Coordinate wrist_pitch: default_value=-0.08051204 range=(-3.14 3.14)
      PhysicalOffsetFrame GND_offset: socket_parent=/bodyset/GND translation=(-0.05371675 0.07637871 -0.0007184601)
          orientation=(2.245568e-10 6.188381e-26 4.436408e-9)
      PhysicalOffsetFrame WRIST_offset: socket_parent=/bodyset/WRIST
          translation=(-0.005787738 0.005115591 -0.001405166) orientation=(1.394908e-17 0 0)
    PinJoint cmc5: socket_parent_frame=WRIST_offset socket_child_frame=MC5_offset
      Coordinate cmc5: default_value=0 range=(0 0.2032)
      PhysicalOffsetFrame WRIST_offset: socket_parent=/bodyset/WRIST translation=(0.02392605 -0.001938343 0.0122935)
          orientation=(-0.0234161 1.509007 0.1104595)
      PhysicalOffsetFrame MC5_offset: socket_parent=/bodyset/MC5 translation=(0.002177538 0.002216119 0.002175152)
          orientation=(1.447048 -0.007023629 0.1021769)
    GimbalJoint mcp5: socket_parent_frame=MC5_offset socket_child_frame=PP5_offset
      Coordinate rx: default_value=0 locked=true
      Coordinate mc5_abduction: default_value=0.2617823 range=(-0.261799 0.261799)
      Coordinate mc5_flexion: default_value=0 range=(-0.785398 1.570796)
      PhysicalOffsetFrame MC5_offset: socket_parent=/bodyset/MC5 translation=(-0.01345812 -0.04730549 0.007947408)
          orientation=(2.072149 1.227616 -0.6388076)
      PhysicalOffsetFrame PP5_offset: socket_parent=/bodyset/PP5 translation=(-0.002358204 -0.005005509 -0.001752563)
          orientation=(2.072149 1.227616 -0.6388076)
    PinJoint pip5: socket_parent_frame=PP5_offset socket_child_frame=PM5_offset
      Coordinate pip5: default_value=0 range=(0 1.745329)
      PhysicalOffsetFrame PP5_offset: socket_parent=/bodyset/PP5 translation=(-0.01432303 -0.03724065 0.004548021)
          orientation=(1.456826 1.206093 -0.007056414)
      PhysicalOffsetFrame PM5_offset: socket_parent=/bodyset/PM5 translation=(-0.00182287 -0.003740471 0.0002481788)
          orientation=(1.456824 1.206087 -0.00710377)
    PinJoint dip5: socket_parent_frame=PM5_offset socket_child_frame=PD5_offset
      Coordinate dip5: default_value=0 range=(0 1.396263)
      PhysicalOffsetFrame PM5_offset: socket_parent=/bodyset/PM5 translation=(-0.00894976 -0.0222736 0.002846837)
          orientation=(1.508158 1.190809 -0.05989672)
      PhysicalOffsetFrame PD5_offset: socket_parent=/bodyset/PD5 translation=(-0.001449913 -0.002773538 0.0008469373)
          orientation=(1.508164 1.190806 -0.05993077)
    WeldJoint fixed: socket_parent_frame=MC5_offset socket_child_frame=MC4_offset
      PhysicalOffsetFrame MC5_offset: socket_parent=/bodyset/MC5 translation=(0.003700756 -0.001450125 0.002548829)
          orientation=(-2.624327 -0.9007072 2.164225)
      PhysicalOffsetFrame MC4_offset: socket_parent=/bodyset/MC4 translation=(-0.003700365 0.001449669 -0.002549656)
          orientation=(-2.624598 -0.9005758 2.163794)
    GimbalJoint mcp4: socket_parent_frame=MC4_offset socket_child_frame=PP4_offset
      Coordinate rx: default_value=0 locked=true
      Coordinate mc4_abduction: default_value=0.104947 range=(-0.261799 0.261799)
      Coordinate mc4_flexion: default_value=0 range=(-0.785398 1.570796)
      PhysicalOffsetFrame MC4_offset: socket_parent=/bodyset/MC4 translation=(-0.005886841 -0.05462303 0.00715977)
          orientation=(1.941685 1.449549 -0.4981225)
      PhysicalOffsetFrame PP4_offset: socket_parent=/bodyset/PP4 translation=(-0.0005869176 -0.005723067 0.0001597181)
          orientation=(1.941685 1.449549 -0.4981225)
    PinJoint pip4: socket_parent_frame=PP4_offset socket_child_frame=PM4_offset
      Coordinate pip4: default_value=0 range=(0 1.745329)
      PhysicalOffsetFrame PP4_offset: socket_parent=/bodyset/PP4 translation=(-0.004377535 -0.04263733 0.006137237)
          orientation=(1.302054 1.483136 0.106934)
      PhysicalOffsetFrame PM4_offset: socket_parent=/bodyset/PM4 translation=(-0.0004775301 -0.002837162 0.0004372075)
          orientation=(1.302054 1.483136 0.106934)
    PinJoint dip4: socket_parent_frame=PM4_offset socket_child_frame=PD4_offset
      Coordinate dip4: default_value=0 range=(0 1.396263)
      PhysicalOffsetFrame PM4_offset: socket_parent=/bodyset/PM4 translation=(-0.002648698 -0.02719676 0.003466897)
          orientation=(1.762682 1.469414 -0.3171478)
      PhysicalOffsetFrame PD4_offset: socket_parent=/bodyset/PD4 translation=(-4.86169e-5 -0.002697058 0.000166893)
          orientation=(1.762682 1.469414 -0.3171478)
    WeldJoint fixed2: socket_parent_frame=WRIST_offset socket_child_frame=MC3_offset
      PhysicalOffsetFrame WRIST_offset: socket_parent=/bodyset/WRIST translation=(0.02761791 0.001470663 -0.0007440869)
          orientation=(2.245548e-10 0.1011469 -4.436408e-9)
      PhysicalOffsetFrame MC3_offset: socket_parent=/bodyset/MC3 translation=(-0.002234476 0.02714648 -0.004851967)
          orientation=(1.546689 -1.414022 0.09934993)
    GimbalJoint mcp3: socket_parent_frame=MC3_offset socket_child_frame=PP3_offset
      Coordinate rx: default_value=0 locked=true
      Coordinate mc3_abduction: default_value=0 range=(-0.261799 0.261799)
      Coordinate mc3_flexion: default_value=0 range=(-0.785398 1.570796)
      PhysicalOffsetFrame MC3_offset: socket_parent=/bodyset/MC3 translation=(0.0001874081 -0.0320621 0.00321418)
          orientation=(-0.6361765 1.519556 2.0951)
      PhysicalOffsetFrame PP3_offset: socket_parent=/bodyset/PP3 translation=(-5.265232e-5 -0.005771885 0.001436204)
          orientation=(-0.6361831 1.519556 2.095106)
    PinJoint pip3: socket_parent_frame=PP3_offset socket_child_frame=PM3_offset
      Coordinate pip3: default_value=0 range=(0 1.745329)
      PhysicalOffsetFrame PP3_offset: socket_parent=/bodyset/PP3 translation=(0.001921272 -0.04702909 0.006194241)
          orientation=(-2.957965 1.440636 -1.887889)
      PhysicalOffsetFrame PM3_offset: socket_parent=/bodyset/PM3 translation=(0.0002713106 -0.002818212 -3.580749e-5)
          orientation=(-2.957965 1.440636 -1.887889)
    PinJoint dip3: socket_parent_frame=PM3_offset socket_child_frame=PD3_offset
      Coordinate dip3: default_value=0 range=(0 1.396263)
      PhysicalOffsetFrame PM3_offset: socket_parent=/bodyset/PM3 translation=(0.00129235 -0.03204626 0.003139332)
          orientation=(1.523839 1.519309 -0.04929703)
      PhysicalOffsetFrame PD3_offset: socket_parent=/bodyset/PD3 translation=(-7.269019e-5 -0.00299909 0.00118576)
          orientation=(1.523643 1.519297 -0.04921952)
    WeldJoint fixed3: socket_parent_frame=WRIST_offset socket_child_frame=MC2_offset
      PhysicalOffsetFrame WRIST_offset: socket_parent=/bodyset/WRIST translation=(0.02706161 0.0002957433 -0.00787201)
          orientation=(2.245548e-10 0.1011469 -4.436408e-9)
      PhysicalOffsetFrame MC2_offset: socket_parent=/bodyset/MC2 translation=(-0.009338509 0.02633704 -0.003679477)
          orientation=(1.546689 -1.414022 0.09934993)
    GimbalJoint mcp2: socket_parent_frame=MC2_offset socket_child_frame=PP2_offset
      Coordinate rx: default_value=0 locked=true
      Coordinate mc2_abduction: default_value=-0.1532221 range=(-0.261799 0.261799)
      Coordinate mc2_flexion: default_value=0 range=(-0.785398 1.570796)
      PhysicalOffsetFrame MC2_offset: socket_parent=/bodyset/MC2 translation=(0.00476394 -0.03313347 0.004192844)
          orientation=(-2.607822 1.342111 -2.243258)
      PhysicalOffsetFrame PP2_offset: socket_parent=/bodyset/PP2 translation=(0.001262987 -0.004890544 0.000572823)
          orientation=(-2.607823 1.34211 -2.243257)
    PinJoint pip2: socket_parent_frame=PP2_offset socket_child_frame=PM2_offset
      Coordinate pip2: default_value=0 range=(0 1.745329)
      PhysicalOffsetFrame PP2_offset: socket_parent=/bodyset/PP2 translation=(0.00786918 -0.0456147 0.00679592)
          orientation=(-2.419748 1.375157 -2.196718)
      PhysicalOffsetFrame PM2_offset: socket_parent=/bodyset/PM2 translation=(0.0003522541 -0.004341617 -0.0005293861)
          orientation=(-2.419729 1.375153 -2.196883)
    PinJoint dip2: socket_parent_frame=PM2_offset socket_child_frame=PD2_offset
      Coordinate dip2: default_value=0 range=(0 1.396263)
      PhysicalOffsetFrame PM2_offset: socket_parent=/bodyset/PM2 translation=(0.003551301 -0.02787966 0.002538137)
          orientation=(-1.775685 1.489057 -3.011662)
      PhysicalOffsetFrame PD2_offset: socket_parent=/bodyset/PD2 translation=(0.0002182554 -0.002991527 0.001318507)
          orientation=(-1.775604 1.489072 -3.011883)
    GimbalJoint tm1: socket_parent_frame=WRIST_offset socket_child_frame=MC1_offset
      Coordinate rx: default_value=0 locked=true
      Coordinate tm1_abduction: default_value=-0.436332 range=(-0.436332 0.436332)
      Coordinate tm1_flexion: default_value=0.08323475 range=(-0.785398 0.261799)
      PhysicalOffsetFrame WRIST_offset: socket_parent=/bodyset/WRIST translation=(0.02269856 -0.01250894 -0.02208438)
          orientation=(1.655336 -0.5643703 2.367387)
      PhysicalOffsetFrame MC1_offset: socket_parent=/bodyset/MC1 translation=(-0.002998192 0.002248645 0.001041032)
          orientation=(-2.694822 0.05496481 -2.444995)
    GimbalJoint mcp1: socket_parent_frame=MC1_offset socket_child_frame=PD1_offset
      Coordinate rx: default_value=0 locked=true
      Coordinate mcp1a: default_value=-0.1999091 range=(-0.392 0.799)
      Coordinate mcp1_flexion: default_value=0.2521474 range=(-0.698132 0.785398)
      PhysicalOffsetFrame MC1_offset: socket_parent=/bodyset/MC1 translation=(0.01860429 -0.03416929 -0.01368644)
          orientation=(-2.926201 -0.3180948 -2.099784)
      PhysicalOffsetFrame PD1_offset: socket_parent=/bodyset/PD1 translation=(0.002104282 -0.004969343 -0.0009864233)
          orientation=(-2.926201 -0.3180948 -2.099784)
    PinJoint dip1: socket_parent_frame=PD1_offset socket_child_frame=PP1_offset
      Coordinate dip1: default_value=0.070372 range=(-0.436332 1.308997)
      PhysicalOffsetFrame PD1_offset: socket_parent=/bodyset/PD1 translation=(0.01582357 -0.02933313 -0.01155061)
          orientation=(-2.983545 -0.4053371 -2.080764)
      PhysicalOffsetFrame PP1_offset: socket_parent=/bodyset/PP1 translation=(0.001823612 -0.003433146 -0.001450619)
          orientation=(-2.983545 -0.4053371 -2.080764)
